# OpenSim document version 40500
Model Acrobot_SEA:
  gravity: 0 -9.81 0
  PhysicalOffsetFrame link1_offset_frame: socket_parent=/bodyset/link1 translation=(0 0 0) [meters]
    Cylinder link1_offset_frame_geom_1: radius=0.05 half_height=0.5
  PhysicalOffsetFrame link2_offset_frame: socket_parent=/bodyset/link2 translation=(0 0 0)
    Cylinder link2_offset_frame_geom_1: radius=0.05 half_height=0.5
  PhysicalOffsetFrame link2_offset_frame_0: socket_parent=/bodyset/link2 translation=(0 0.5 0)
    Sphere link2_offset_frame_geom_1: radius=0.06
  PhysicalOffsetFrame link2_offset_frame_1: socket_parent=/bodyset/link2 translation=(0 -0.5 0)
    Sphere link2_offset_frame_geom_1: radius=0.06
  Ground
  BodySet:
    Body link1: mass=1 [kg] mass_center=(0 0 0) inertia=(0.33 0.33 0.33 0 0 0)
    Body link2: mass=1 mass_center=(0 0 0) inertia=(0.33 0.33 0.33 0 0 0)
  JointSet:
    PinJoint theta1: socket_parent_frame=ground_offset socket_child_frame=link1_offset
      Coordinate theta1: default_value=0
      PhysicalOffsetFrame ground_offset: socket_parent=/ground translation=(0 2.5 0)
      PhysicalOffsetFrame link1_offset: socket_parent=/bodyset/link1 translation=(0 0.5 0)
    PinJoint theta2: socket_parent_frame=link1_offset socket_child_frame=link2_offset
      Coordinate theta2: default_value=0
      PhysicalOffsetFrame link1_offset: socket_parent=/bodyset/link1 translation=(0 -0.5 0)
      PhysicalOffsetFrame link2_offset: socket_parent=/bodyset/link2 translation=(0 0.5 0)
  ControllerSet:
    CustomController: actuator_list=SEA socket_coordinate=/jointset/theta2/theta2 kp=50 kv=2.5
  ForceSet:
    SeriesElasticActuator SEA: socket_coordinate=/jointset/theta2/theta2 motor_inertia=0.1 [kg*m^2]
        motor_damping=1 [N*m*s/rad] stiffness=100 [N*m/rad]
