# OpenSim document version 40500
Model SEA_Test:
  gravity: 0 -9.80665 0
  PhysicalOffsetFrame Cyl1_frame: socket_parent=/bodyset/pendulum translation=(0 0.25 0) [meters]
    Cylinder Cyl1_frame_geom_1: radius=0.03 half_height=0.25
  Ground
  BodySet:
    Body pendulum: mass=1 [kg] mass_center=(0 0.25 0) inertia=(0.1 0.1 0.1 0 0 0)
      Sphere pendulum_geom_1: radius=0.05
  JointSet:
    PinJoint q_joint: socket_parent_frame=ground_offset socket_child_frame=pendulum_offset
      Coordinate joint_coord_0
      PhysicalOffsetFrame ground_offset: socket_parent=/ground translation=(0 1 0)
      PhysicalOffsetFrame pendulum_offset: socket_parent=/bodyset/pendulum translation=(0 0.5 0)
  ControllerSet:
    PrescribedController: actuator_list=my_sea
      FunctionSet ControlFunctions: Constant(value=5)
  ForceSet:
    SeriesElasticActuator my_sea: socket_coordinate=/jointset/q_joint/joint_coord_0 motor_inertia=0.1 [kg*m^2]
        motor_damping=0.01 [N*m*s/rad] stiffness=100 [N*m/rad]
